ORIGIN := 1
matrix := [3, -2, 5, 0; 4, 5, 8, 1; 1, 1, 2, 1; 2, 7, 6, 5]
rightPart := [2; 4; 5; 7]
X := [0; 0; 0; 0]
N := 4
extenededMatrix := augment(matrix, rightPart)
extenededMatrix = [3, -2, 5, 0, 2; 4, 5, 8, 1, 4; 1, 1, 2, 1, 5; 2, 7, 6, 5, 7]
elimination(matrix) :=
    for i ∈ 1 .. N - 1
        for j ∈ i + 1 .. N
            if matrix[j, i] == 0
                continue
            topElement ← matrix[i, i]
            bottomElement ← matrix[j, i]
            multiplier ← topElement/bottomElement
            for k ∈ i .. N + 1
                matrix[j, k] ← matrix[i, k] - (matrix[j, k]*multiplier)
    matrix
eliminatedMatrix := elimination(extenededMatrix) = [3, -2, 5, 0, 2; 0, -5.75, -1, -0.75, -1; 0, 0, 0.15, 2.7, 13.95; 0, 0, 0, 2.21786, 13.4304]
X := eliminatedMatrix[:, 5]
newMatrix := submatrix(eliminatedMatrix, 1, 4, 1, 4)
X = [2; -1; 13.95; 13.4304]
newMatrix = [3, -2, 5, 0; 0, -5.75, -1, -0.75; 0, 0, 0.15, 2.7; 0, 0, 0, 2.21786]
solution := lsolve(newMatrix, X)
solution = [28.7778; 2.16667; -16; 6.05556]
