# Worksheet setting: ORIGIN = 1
# Початкові значення
variant := 9
n := variant - 5 = 4
a := 1 + 0.4*n = 2.6
interval := [0; 4]
k := variant - 5 = 4
b := 1 + 0.4*k = 2.6
h := 0.1
d/dt(y(t)) == y(t) - y(t)^2
y(0) == 0.1
y'(x) := e^(-a*x)*(y^2 + b)  # error: This variable is undefined. Check that the label is set correctly.
y := odesolve(t, 10)  # error: This variable is undefined. Check that the label is set correctly.
